# Mechatronische Netzwerke
#
# Beispiel Isomorphes Netzwerk (transformatorisch)
# Eingaben
# Masse
m_2 := 1 kg
# Steifigkeit
c_2 := 394.78*10^3 N/m
# Lehrsches Dämpfunfgsmaß
D_1 := 0.01
k_21 := 2*D_1*sqrt(c_2*m_2) = 12.5663 kg/s
D_2 := 0.001
k_22 := 2*D_2*sqrt(c_2*m_2) = 1.25663 kg/s
# Erregerkraft
F_2 := 1 N
# isomorphe Transformation
# mechanische Kapazität
C_2 := m_2 = 1 kg
# mechanische Induktivität
L_2 := 1/c_2 = 2.53306 μm/N
# mechanischer Widerstand
R_21 := 1/k_21 = 0.0795779 s/kg
R_22 := 1/k_22 = 0.795779 s/kg
# Transformation (Kettenmatrix)
# Parameter der Kettenmatrix
A_11 := 1*V*s/m
A_22 := 1*A/N
# elektrische Kapazität
C_1 := A_22/A_11*C_2 = 1 F
# elektrische Induktivität
L_1 := A_11/A_22*L_2 = 2.53306 μH
# Transformation (Kettenmatrix)
# elektrischer Widerstand
R_11 := A_11/A_22*R_21 = 0.0795779 Ω
R_12 := A_11/A_22*R_22 = 0.795779 Ω
# elektrischer Strom
I_1 := -A_22*F_2 = -1 A
# Transformation (Hybridmatrix)
# Parameter der Hybridmatrix
H_12 := 1*V*s/m
H_21 := -1*N/A
# elektrische Kapazität
C_1 := -1/(H_12*H_21)*C_2 = 1 F
# elektrische Induktivität
L_1 := -H_12*H_21*L_2 = 2.53306 μH
# Transformation (Hybridmatrix)
# elektrischer Widerstand
R_11 := -H_12*H_21*R_21 = 0.0795779 Ω
R_12 := -H_12*H_21*R_22 = 0.795779 Ω
# elektrischer Strom
I_1 := 1/H_21*F_2 = -1 A
# Kennwerte
# Eigenkreisfrequenz mechanisch
ω_0 := sqrt(c_2/m_2) = 628.315 1/s
# Eigenkreisfrequenz elektrisch
ω_0 := 1/sqrt(L_1*C_1) = 628.315 1/s
# Abklingkonstante mechanisch
δ_21 := k_21/(2*m_2) = 6.28315 1/s
δ_22 := k_22/(2*m_2) = 0.628315 1/s
# Abklingkonstante elektrisch
δ_11 := 1/(2*R_11*C_1) = 6.28315 1/s
δ_12 := 1/(2*R_12*C_1) = 0.628315 1/s
# Maximum der Vergrößerungsfunktion
V_max := 1/(2*D_1*sqrt(1 - D_1^2)) = 50.0025
# maximale Schwingamplitude
q_max := F_2/c_2*V_max = 126.659 μm
