# Mechatronische Netzwerke
#
# Eigenschaften eines Transformators
# Impedanztransformation (Kettenmatrix)
# Transformator in Kettenform (A-Matrix)
[Y_1; I_X1] == [A_11, 0; 0, A_22]*[Y_2; I_X2]
# reziproker Wandler (|A| == 1)
A_22 == A_11^-1
# Impedanztransformation (allgemein)
Z_1 == A_11/A_22*Z_2
# Widerstand R
Z_2 == R_2
Z_1 == A_11/A_22*R_2 == R_1
# Transformationsbeziehung (R)
R_1 == A_11/A_22*R_2
# Induktivität L
Z_2 == 1i*ω*L_2
Z_1 == A_11/A_22*1i*ω*L_2 == 1i*ω*L_1
# Transformationsbeziehung (L)
L_1 == A_11/A_22*L_2
# Kapazität C
Z_2 == 1/(1i*ω*C_2)
Z_1 == A_11/A_22*1/(1i*ω*C_2) == 1/(1i*ω*C_1)
# Transformationsbeziehung (C)
C_1 == A_22/A_11*C_2
# Reihenschaltung
Z_2 == Z_21 + Z_22
Z_1 == A_11/A_22*Z_2 == A_11/A_22*Z_21 + A_11/A_22*Z_22 == Z_11 + Z_22
# Transformationsbeziehung (Z)
Z_11 == A_22/A_11*Z_21
Z_12 == A_22/A_11*Z_22
# Parallelschaltung
Y_2 == Y_21 + Y_22
Z_1 == A_11/A_22*1/Y_2 == A_11/A_22*1/(Y_21 + Y_22)
1/Y_1 == A_11/A_22*1/(Y_21 + Y_22) == 1/(Y_11 + Y_12)
(A_22*Y_21 + A_22*Y_22)/A_11 == Y_11 + Y_12
# Transformationsbeziehung (Z)
Z_11 == A_11/A_22*Z_21
Z_12 == A_11/A_22*Z_22
# aktive Bauelemente
[Y_1; I_X1] == [A_11, 0; 0, A_22]*[Y_2; -I_X2]
# Transformationsbeziehungen
Y_1 == A_11*Y_2
I_X1 == -A_22*I_X2
# Impedanztransformation (Hybridmatrix)
# Transformator in Hybridform (H-Matrix)
[Y_1; I_X2] == [0, H_12; H_21, 0]*[I_X1; Y_2]
# reziproker Wandler
H_12 == -H_21
# Impedanztransformation (allgemein)
Z_1 == -H_12*H_21*Z_2
# Widerstand R
Z_2 == R_2
# Transformationsbeziehung (R)
R_1 == -H_12*H_21*R_2
# Induktivität L
Z_2 == 1i*ω*L_2
# Transformationsbeziehung (L)
L_1 == -H_12*H_21*L_2
# Kapazität C
Z_2 == 1/(1i*ω*C_2)
# Transformationsbeziehung (C)
C_1 == -1/(H_12*H_21)*C_2
# Reihenschaltung
Z_2 == Z_21 + Z_22
# Transformationsbeziehung (Z)
Z_11 == -1/(H_12*H_21)*Z_21
Z_12 == -1/(H_12*H_21)*Z_22
# Parallelschaltung
Y_2 == Y_21 + Y_22
# Transformationsbeziehung (Z)
Z_11 == -H_12*H_21*Z_21
Z_12 == -H_12*H_21*Z_22
# aktive Bauelemente
[Y_1; I_X2] == [0, H_12; H_21, 0]*[I_X1; Y_2]
# Transformationsbeziehungen
Y_1 == H_12*Y_2
I_X1 == 1/H_21*I_X2
