# Mechatronische Netzwerke
#
# Beschleunigungssensor
# Bestimmung der Wandlerparameter (Leitwertsmatrix Y)
# Gyrator in Leitwertsform (Y-Matrix)
[I_X1; I_X2] == [Y_11, Y_12; Y_21, Y_22]*[Y_1; Y_2]
# reziproker Wandler
Y_12 == Y_21
# elektromechanisches System
# Gyrator in Leitwertsform (Y-Matrix)
[I; F] == [Y_11, Y_12; Y_21, Y_22]*[U; v]
# Betrieb im elektrischen Leerlauf (I=0)
Y_11*U == -Y_12*v
# Schwinggeschwindigkeit
v == -Y_11/Y_12*U
# Wandlergleichung II
F == Y_21*U + Y_22*v
F == U*(Y_21 - Y_22*Y_11/Y_12)
# Trägkeitskraft des Sensors
F == m_S*a == U*(Y_21 - Y_22*Y_11/Y_12)
# Spannungsempfindlichkeit des Sensors
B_Ua == U/a
m_S/B_Ua == (Y_12*Y_21 - Y_22*Y_11)/Y_12
# reziproker Wandler
Y_12 == Y_21 == Y
m_S/B_Ua == (Y^2 - Y_22*Y_11)/Y
# quadratische Gleichung
Y^2 - Y*m_S/B_Ua - Y_22*Y_11 == 0
# Wandlerparameter (Y_12 == Y_21 == Y)
Y == m_S/(2*B_Ua) + sqrt((m_S/(2*B_Ua))^2 + Y_22*Y_11)
# Wandlerparameter Y_11und Y_22
# elektrische Impedanz
Z_el == 1/(1i*ω*C_el) == 1/Y_el
# Leitswertsparameter Y_22
Y_22 == C_el
# mechanische Nachgiebigkeit
n == 1/c_m == L_m
# mechanische Impedanz
Z_m == 1i*ω*L_m == 1/Y_m
# Leitswertsparameter Y_11
Y_11 == 1/L_m
# Achtung !
# Dieser Parameter beinhaltet noch keine Rückwirkung durch die elektrische Kapazität.
# Rückwirkungskorrektur
# Transformation der elektrischen
# Kapazität auf mechanische Seite
L_mT == 1/(Y_21*Y_12)*C_el
# Summeninduktivität (mechanisch)
1/L_mS == 1/L_mT + 1/L_m == c_mS
# notwendige mechanische Induktivität
L_m == L_mT/(c_mS*L_mT - 1)
# Leitswertsparameter Y_11
Y_11 == 1/L_m
Y_11 == (c_mS*L_mT - 1)/L_mT
Y_11 == (c_mS*1/(Y_21*Y_12)*C_el - 1)/(1/(Y_21*Y_12)*C_el)
# Leitwertsparameter Y_11
Y_11 == c_mS - Y_12*Y_21/C_el == c_mS - Y^2/C_el
# Wandlerparameter
Y == m_S/(2*B_Ua) + sqrt((m_S/(2*B_Ua))^2 + Y_22*Y_11)
Y == m_S/(2*B_Ua) + sqrt((m_S/(2*B_Ua))^2 + Y_22*(c_mS - Y^2/C_el))
Y == C_el/(2*(C_el + Y_22))*(sqrt(m_S^2/B_Ua^2 + 4*c_mS*Y_22*(1 + Y_22/C_el)) + m_S/B_Ua)
# Resonanzfrequenz Sensor
ω_0^2 == c_mS/m_S
# Summensteifigkeit
c_mS == ω_0^2*m_S
Y == C_el/(2*(C_el + Y_22))*(sqrt(m_S^2/B_Ua^2 + 4*ω_0^2*m_S*Y_22*(1 + Y_22/C_el)) + m_S/B_Ua)
# Ergebnisse (Wandlerparameter)
# Wandlerparameter
Y_12 == Y_21 == 1/4*(sqrt(m_S^2/B_Ua^2 + 8*ω_0^2*m_S*C_el) + m_S/B_Ua)
Y_11 == ω_0^2*m_S - (m_S + B_Ua*sqrt(m_S^2/B_Ua^2 + 8*ω_0^2*m_S*C_el))^2/(16*B_Ua^2*C_el)
Y_22 == C_el
