# Mechatronische Netzwerke
#
# Beispiel Beschleunigungssensor
# Eingaben
# Kengrößen des Beschleunigungssensors
# gemessene Spannungsübertragung
B_Ua := 20*mV/(m/s^2)
# gemessene seismische Masse
m_S := 10*gm
# gemessene Sensorkapazität
C_el := 0.8*nF
# gemessene Resonanzfrequenz
f_0 := 30*kHz
ω_0 := 2*π*f_0
# Schwingbeschleunigung
a := 50 m/s^2
# Berechnung der Wandlerparameter
Y_12 := 1/4*(sqrt(m_S^2/B_Ua^2 + 8*ω_0^2*m_S*C_el) + m_S/B_Ua) = 0.522174 s*A/m
Y_21 := Y_12 = 0.522174 s*A/m
Y_11 := ω_0^2*m_S - (m_S + B_Ua*sqrt(m_S^2/B_Ua^2 + 8*ω_0^2*m_S*C_el))^2/(16*B_Ua^2*C_el) = 14473458 kg/s^2
Y_22 := C_el = 8e-10 F
# Berechnung der Bauelemente
# mechanische Induktivität
L_m := 1/Y_11 = 6.9092e-8 m/N
# Ergebniskontrolle
# Spannungsübertragung
B_Ua := m_S*Y_12/(Y_12*Y_21 - Y_22*Y_11)
B_Ua = 0.02 V*s^2/m
# Erregerkraft
F := m_S*a
F = 0.5 N
# Sensorausgangsspannung
U := B_Ua*a
U = 1 V
# transformierte Induktivität durch elektrische Kapazität
L_mT := 1/(Y_21*Y_12)*C_el
L_mT = 2.93399e-9 m/N
# Reihenschaltung der Induktivitäten
c_ges := 1/L_mT + 1/L_m
c_ges = 355305758 N/m
# Sensorresonanz
f_0 := 1/(2*π)*sqrt(c_ges/m_S)
f_0 = 30000 Hz
